We := 400
fo := 6.21*10^9
c := 299792458
λo := c/fo = 0.0482758
Zo := 120*π
λcrit := λo/sqrt(1 - (Zo/We)^2) = 0.144422
Rad := λcrit/3.41 = 0.0423525
D := 2*Rad = 0.084705
λв := λo/sqrt(1 - (λo/λcrit)^2) = 0.0512222
1790*Rad^2*sqrt(1 - (λo/λcrit)^2) = 3.02609
