c := 299792458
Zo := 120*π
fo := 6.21*10^9
ζH11 := 3.41
We := sqrt(400*802.21) = 566.466
λo := c/fo = 0.0482758
λcrit := λo/sqrt(1 - (Zo/We)^2) = 0.0646794
Rad := λcrit/ζH11 = 0.0189676
D := 2*Rad = 0.0379351
λv := λo/sqrt(1 - (λo/λcrit)^2) = 0.0725391
P := 1790*Rad^2*sqrt(1 - (λo/λcrit)^2) = 0.428581
L := λv/4 = 0.0181348
