c := 299792458
ζH11 := 3.41
Zo := 120*π
foH11 := 6.21*10^9
ζE01 := 2.61
(ζE01*R < λo < ζH11*R)
λo := c/foH11 = 0.0482758
ζ := (ζH11 + ζE01)/2 = 3.01
Rad := λo/ζ = 0.0160385
λcritH11 := ζH11*Rad = 0.0546911
λcritE01 := ζE01*Rad = 0.0418604
Wh := Zo/sqrt(1 - (λo/λcritH11)^2) = 802.21
P := 1790*Rad^2*sqrt(1 - (λo/λcritH11)^2) = 0.216382
